// COMSOL Multiphysics 6.1.0.252 model "Fig. 1f-NaturePhotonics-Non-reciprocal-Metasurface2023-NoData.mph"
// Non-reciprocal Metasurfaces
// This file is for reproducing Fig. 1f of the recent publication in Nature Photonics [10.1038/s41566-023-01333-7]
// 1. Using study node "Linear Problem Solving" to recover Fano shape in the inset of Fig. 1f. You have to click "compute" to start the simulation and visualize the curve in the plot group "Transmission". Then select the wavelength at the minimum transmission as the source wavelength in the following calculation.
// 2. Using study node "Nonlinear Problem Solving (1 to 2)" and "Nonlinear Problem Solving (2 to 1)" to recover Fig. 1f, of course, at one wavelength. To completely reproduce Fig. 1f, just shift the wavelength to the longer one.
// Outline of the model tree

Parameters
  wl = 1.575[um]  // vacuum wavelength
  f = c_const/wl  // frequency
  R = 2.14  // ratio of two stripe widths
  t = 40[nm]  // thickness of the residual silicon layer
  G = 100[nm]  // gap distance
  H = 100[nm]  // total height
  a = 750[nm]  // lattice constant
  b = a  // height of computational domain
  tsub = 200[nm]  // thickness of substrate
  w2 = (a-2*G)/(1+R)  // one of the stripe width
  w1 = R*w2  // the other wdith of stripe
  chi3 = 2.8*10^(-18)[m^2*V^(-2)]  // third order nonlinear coefficient
  I0 = 10[MW*cm^(-2)]  // incident intensity
  Pin = I0*a  // incident power

Variables
  var1 "Variables 1" on selection sel1
    Pnl = 3*epsilon0_const*chi3*abs(ewfd2.Ez)^2*ewfd2.Ez  // Nonlinear polarization density at the fundamental frequency
    eps_nl = chi3*ewfd2.normEi^2  // Nonlinear permittivity

Selections
  sel1: Explicit "Silicon" on domains 2

Geometry
  geom1 "Geometry 1" (2D, length unit m)
    r1: Rectangle "Domain" | layername = Glass Substrate; layer = tsub; size = {a, b}
    pol1: Polygon "metasurface"
      x = 0,0,w2/2,w2/2,w2/2+G,w2/2+G,w2/2+G+w1,w2/2+G+w1,w2/2+2*G+w1,w2/2+2*G+w1,w2+2*G+w1,w2+2*G+w1
      y = tsub,tsub+H,tsub+H,tsub+t,tsub+t,tsub+H,tsub+H,tsub+t,tsub+t,tsub+H,tsub+H,tsub
    fin: Finalize "Form Union"

Materials
  mat2: Common "Si (Silicon) (Pierce and Spicer 1972: a-Si; n,k 0.0103-2.07 um) 1"
    RefractiveIndex
      n = nr(c_const/freq)
      ki = ni(c_const/freq)
      int1: Interpolation
        funcname = nr
        table = 
          {1.033E-1, 3.27E-1}
          {1.078E-1, 3.63E-1}
          {1.127E-1, 3.92E-1}
          {1.181E-1, 4.23E-1}
          {1.240E-1, 4.59E-1}
          {1.305E-1, 4.97E-1}
          {1.378E-1, 5.43E-1}
          {1.459E-1, 5.97E-1}
          {1.550E-1, 6.60E-1}
          {1.653E-1, 7.35E-1}
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        fununit = 1
        argunit = um
      int2: Interpolation
        funcname = ni
        table = 
          {1.033E-1, 7.26E-1}
          {1.078E-1, 8.47E-1}
          {1.127E-1, 9.46E-1}
          {1.181E-1, 1.04E+0}
          {1.240E-1, 1.14E+0}
          {1.305E-1, 1.24E+0}
          {1.378E-1, 1.35E+0}
          {1.459E-1, 1.47E+0}
          {1.550E-1, 1.60E+0}
          {1.653E-1, 1.74E+0}
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        fununit = 1
        argunit = um
  matlnk1: Link "Si" (disabled) on all domains
  mat4: Common "SiO2 (Silicon dioxide, Silica, Quartz) (Malitson 1965: Fused silica; n 0.21-6.7 um) 1"
    DispersionModelSellmeierStandard "Sellmeier"
      ODsma = {0.6961663, 0.4079426, 0.8974794, 0.00467914825849, 0.013512063074, 97.9340025379}
      Trefsma = 22[degC]
      Prefsma = 0
    RefractiveIndex
      ki = 0
  matlnk2: Link "SiO2" on domains 1 | link = mat4
  mat5: Common "Air"
    def "Basic"
      thermalexpansioncoefficient = alpha_p(pA,T)
      molarmass = 0.02897[kg/mol]
      bulkviscosity = muB(T)
      relpermeability = 1
      relpermittivity = 1
      dynamicviscosity = eta(T)
      ratioofspecificheat = 1.4
      electricconductivity = 0[S/m]
      heatcapacity = Cp(T)
      density = rho(pA,T)
      thermalconductivity = k(T)
      soundspeed = cs(T)
      eta: Piecewise | arg = T; pieces = {200.0, 1600.0, -8.38278E-7+8.35717342E-8*T^1-7.69429583E-11*T^2+4.6437266E-14*T^3-1.06585607E-17*T^4}; argunit = K; fununit = Pa*s
      Cp: Piecewise | arg = T; pieces = {200.0, 1600.0, 1047.63657-0.372589265*T^1+9.45304214E-4*T^2-6.02409443E-7*T^3+1.2858961E-10*T^4}; argunit = K; fununit = J/(kg*K)
      rho: Analytic | expr = pA*0.02897/R_const[K*mol/J]/T; args = {pA, T}; fununit = kg/m^3; argunit = {Pa, K}
      k: Piecewise | arg = T; pieces = {200.0, 1600.0, -0.00227583562+1.15480022E-4*T^1-7.90252856E-8*T^2+4.11702505E-11*T^3-7.43864331E-15*T^4}; argunit = K; fununit = W/(m*K)
      cs: Analytic | expr = sqrt(1.4*R_const[K*mol/J]/0.02897*T); args = T; fununit = m/s; argunit = K
      an1: Analytic | funcname = alpha_p; expr = -1/rho(pA,T)*d(rho(pA,T),T); args = {pA, T}; fununit = 1/K; argunit = {Pa, K}
      an2: Analytic "Analytic 2a" | funcname = muB; expr = 0.6*eta(T); args = T; fununit = Pa*s; argunit = K
    RefractiveIndex
      n = 1
      ki = 0
    NonlinearModel
      BA = (def.gamma+1)/2
    idealGas
      Rs = R_const/Mn
      heatcapacity = Cp(T)
      ratioofspecificheat = 1.4
      molarmass = 0.02897
      Cp: Piecewise | arg = T; pieces = {200.0, 1600.0, 1047.63657-0.372589265*T^1+9.45304214E-4*T^2-6.02409443E-7*T^3+1.2858961E-10*T^4}; argunit = K; fununit = J/(kg*K)
  matlnk3: Link "Air" on domains 3 | link = mat5
  mat6: Common "Si (Silicon) (Pierce and Spicer 1972: a-Si; n,k 0.0103-2.07 um)" on domains 2
    def "Basic"
      relpermeability = 1
      electricconductivity = 0
    RefractiveIndex
      n = nr(c_const/freq)
      ki = ni(c_const/freq)
      int1: Interpolation
        funcname = nr
        table = 
          {1.033E-1, 3.27E-1}
          {1.078E-1, 3.63E-1}
          {1.127E-1, 3.92E-1}
          {1.181E-1, 4.23E-1}
          {1.240E-1, 4.59E-1}
          {1.305E-1, 4.97E-1}
          {1.378E-1, 5.43E-1}
          {1.459E-1, 5.97E-1}
          {1.550E-1, 6.60E-1}
          {1.653E-1, 7.35E-1}
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        fununit = 1
        argunit = um
      int2: Interpolation
        funcname = ni
        table = 
          {1.033E-1, 7.26E-1}
          {1.078E-1, 8.47E-1}
          {1.127E-1, 9.46E-1}
          {1.181E-1, 1.04E+0}
          {1.240E-1, 1.14E+0}
          {1.305E-1, 1.24E+0}
          {1.378E-1, 1.35E+0}
          {1.459E-1, 1.47E+0}
          {1.550E-1, 1.60E+0}
          {1.653E-1, 1.74E+0}
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        fununit = 1
        argunit = um

Physics
  ewfd: ElectromagneticWavesFrequencyDomain "Linear Optics" on all domains
    dependent variable E = {Ex, Ey, Ez}
    wee1: WaveEquationElectric (default)
    pec1: PerfectElectricConductor (default)
    init1: init "Initial Values 1" (default)
    port1: Port on boundaries 2
      Pin = Pin
      PortType = Periodic
      Eampl = {0, 0, 1}
      n = sqrt(1+mat4.DispersionModelSellmeierStandard.ODsma1*(c_const/(freq*1[um]))^2/((c_const/(freq*1[um]))^2-mat4.DispersionModelSellmeierStandard.ODsma4)+mat4.DispersionModelSellmeierStandard.ODsma2*(c_const/(freq*1[um]))^2/((c_const/(freq*1[um]))^2-mat4.DispersionModelSellmeierStandard.ODsma5)+mat4.DispersionModelSellmeierStandard.ODsma3*(c_const/(freq*1[um]))^2/((c_const/(freq*1[um]))^2-mat4.DispersionModelSellmeierStandard.ODsma6))
    port2: Port on boundaries 7 | PortExcitation = off; PortType = Periodic; Eampl = {0, 0, 1}; n = 1
    pc1: PeriodicCondition on boundaries 1, 3, 5, 16-18
      PeriodicType = Floquet
      Floquet_source = FromPeriodicPort
      destinationDomains: boundaries 16-18
  ewfd2: ElectromagneticWavesFrequencyDomain "Nonlinear Optics (1 to 2)" on all domains
    dependent variable E2 = {E2x, E2y, E2z}
    EquationForm.form = Automatic
    wee1: WaveEquationElectric (default)
    pec1: PerfectElectricConductor (default)
    init1: init "Initial Values 1" (default)
    port1: Port on boundaries 2
      Pin = Pin
      PortType = Periodic
      Eampl = {0, 0, 1}
      n = sqrt(1+mat4.DispersionModelSellmeierStandard.ODsma1*(c_const/(freq*1[um]))^2/((c_const/(freq*1[um]))^2-mat4.DispersionModelSellmeierStandard.ODsma4)+mat4.DispersionModelSellmeierStandard.ODsma2*(c_const/(freq*1[um]))^2/((c_const/(freq*1[um]))^2-mat4.DispersionModelSellmeierStandard.ODsma5)+mat4.DispersionModelSellmeierStandard.ODsma3*(c_const/(freq*1[um]))^2/((c_const/(freq*1[um]))^2-mat4.DispersionModelSellmeierStandard.ODsma6))
    port2: Port on boundaries 7 | PortType = Periodic; Eampl = {0, 0, 1}
    pc1: PeriodicCondition on boundaries 1, 3, 5, 16-18
      PeriodicType = Floquet
      Floquet_source = FromPeriodicPort
      destinationDomains: boundaries 16-18
    pol1: Polarization on selection sel1 | P = {0, 0, epsilon0_const*chi3*abs(ewfd2.Ez)^2*ewfd2.Ez}
  ewfd3: ElectromagneticWavesFrequencyDomain "Nonlinear Optics (2 to 1)" on all domains
    dependent variable E3 = {E3x, E3y, E3z}
    wee1: WaveEquationElectric (default)
    pec1: PerfectElectricConductor (default)
    init1: init "Initial Values 1" (default)
    port1: Port on boundaries 7 | Pin = Pin; PortType = Periodic; E0 = {0, 0, 1}; Eampl = {0, 0, 1}
    port2: Port on boundaries 2
      PortExcitation = off
      Pin = Pin
      PortType = Periodic
      E0 = {0, 0, 1}
      Eampl = {0, 0, 1}
      n = sqrt(1+mat4.DispersionModelSellmeierStandard.ODsma1*(c_const/(freq*1[um]))^2/((c_const/(freq*1[um]))^2-mat4.DispersionModelSellmeierStandard.ODsma4)+mat4.DispersionModelSellmeierStandard.ODsma2*(c_const/(freq*1[um]))^2/((c_const/(freq*1[um]))^2-mat4.DispersionModelSellmeierStandard.ODsma5)+mat4.DispersionModelSellmeierStandard.ODsma3*(c_const/(freq*1[um]))^2/((c_const/(freq*1[um]))^2-mat4.DispersionModelSellmeierStandard.ODsma6))
    pc1: PeriodicCondition on boundaries 1, 3, 5, 16-18
      PeriodicType = Floquet
      Floquet_source = FromPeriodicPort
      destinationDomains: boundaries 16-18
    pol1: Polarization on domains 2 | P = {0, 0, epsilon0_const*chi3*abs(ewfd3.Ez)^2*ewfd3.Ez}

Mesh
  mesh1 "Mesh 1"
    size: MeshSizeDefault | hmax = 1.2500E-7; hmin = 2.2500E-10; hcurve = 0.3; hgrad = 1.3; custom = on
    size1: Size on domains 1 | hmax = 8.6180E-8; hmin = 2.2500E-10; hcurve = 0.3; hgrad = 1.3; custom = on
    size2: Size on domains 2 | hmax = 1E-8
    size3: Size on boundaries 5, 18 | hmax = 1.2500E-7; hmin = 2.2500E-10; hcurve = 0.3; hgrad = 1.3; custom = on
    size4: Size on boundaries 1, 16 | hmax = 8.6180E-8; hmin = 2.2500E-10; hcurve = 0.3; hgrad = 1.3; custom = on
    size5: Size on boundaries 3, 17 | hmax = 3.4350E-8; hmin = 2.2500E-10; hcurve = 0.3; hgrad = 1.3; custom = on
    edg1: Edge on boundaries 1, 3, 5 | smoothmaxiter = 4; smoothmaxdepth = 4
    copy1: Copy
      mesh = mesh1
      source = boundaries 1, 3, 5
      destination = boundaries 16-18
      smoothmaxiter = 4
      smoothmaxdepth = 4
    ftri1: FreeTri "Free Triangular 1" on remaining entities | smoothmaxiter = 4; smoothmaxdepth = 4

Studies
  std1 "Linear Problem Solving"
    param: Parametric "Parametric Sweep" (disabled)
      sweeptype = filled
      pname = wl
      plistarr = range(1.48[um],0.001[um],1.6[um])
      punit = m
    freq: Frequency "Frequency Domain" | punit = THz; plist = f; solve for = {ewfd, ewfd3}
  std2 "Nonlinear Problem Solving (1 to 2)"
    param: Parametric "Parametric Sweep" | pname = I0; plistarr = range(1[MW/cm^2],2[MW/cm^2],201[MW/cm^2]); punit = W/m^2
    freq: Frequency "Frequency Domain" | punit = THz; plist = f; solve for = {ewfd2}
  std3 "Nonlinear Problem Solving (2 to 1)"
    param: Parametric "Parametric Sweep" | pname = I0; plistarr = range(1[MW/cm^2],5[MW/cm^2],400[MW/cm^2]); punit = W/m^2
    freq: Frequency "Frequency Domain" | punit = THz; plist = f; solve for = {ewfd3}

Solver configurations
  sol1 "Solution 1" (study std1)
    v1: Variables "Dependent Variables 1"
    s1: Stationary "Stationary Solver 1" | stol = 0.01; linpmethod = sol
      p1: Parametric | pname = freq; plistarr = f; punit = THz; pcontinuationmode = no
      fc1: FullyCoupled | linsolver = d1
      d1: Direct "Suggested Direct Solver (ewfd)"
  sol2 "Parametric Solutions 1" (study std1)
  sol124 "Solution 124" (study std2)
    v1: Variables "Dependent Variables 1"
    s1: Stationary "Stationary Solver 1" | stol = 0.01; linpmethod = sol
      p1: Parametric
        pname = I0
        plistarr = range(1[MW/cm^2],2[MW/cm^2],201[MW/cm^2])
        punit = W/m^2
        pcontinuationmode = no
      fc1: FullyCoupled | linsolver = d1
      d1: Direct "Suggested Direct Solver (ewfd2)"
  sol125 "Solution 125" (study std3)
    v1: Variables "Dependent Variables 1"
    s1: Stationary "Stationary Solver 1" | stol = 0.01; linpmethod = sol
      p1: Parametric
        pname = I0
        plistarr = range(1[MW/cm^2],5[MW/cm^2],400[MW/cm^2])
        punit = W/m^2
        pcontinuationmode = no
      fc1: FullyCoupled | linsolver = d1
      d1: Direct "Suggested Direct Solver (ewfd3)"

Datasets
  dset1: Solution | solution = sol1
  dset2: Solution | solution = sol2
  dset3: Solution | solution = sol124
  dset4: Solution | solution = sol125

Plots
  pg1: PlotGroup1D "Transmission" | data = dset2; xlabel = Wavelength (nm); ylabel = Transmission
    glob1: Global | expr = ewfd.Ttotal; unit = 1; descr = Total transmittance; xdata = expr; xdataexpr = wl
  pg3: PlotGroup1D "Nonlinear transmission"
    data = none
    xlabel = Intensity (log10 MW/cm<sup>2</sup>)
    ylabel = Nonlinear Transmission
    glob1: Global
      data = dset3
      expr = ewfd2.Ttotal
      unit = 1
      descr = Total transmittance
      xdata = expr
      xdataexpr = log10(I0)-10
      legends = 1 to 2
    glob2: Global
      data = dset4
      expr = ewfd3.Ttotal
      unit = 1
      descr = Total transmittance
      xdata = expr
      xdataexpr = log10(I0)-10
      legends = 2 to 1